clear
set defaultbasefrequency=60
new object=circuit.lehigh basekv=115 pu=1.0001 phases=3 bus1=sourcebus angle=30 mvasc3=20000 mvasc1=21000
edit object=vsource.source basekv=115 bus1=sourcebus.1.2.3 pu=1.00 r1=0 x1=0.0001 r0=0 x0=0.0001
new object=vsource.secondsource basekv=4.16 bus1=680.1.2.3 pu=1.00 r1=0 x1=0.0001 r0=0 x0=0.0001
new object=transformer.sub phases=3 windings=2 xhl=0.008 buses=[sourcebus.1.2.3,650.1.2.3] conns=[delta,wye] kvs=[115,4.16] kvas=[5000,5000] %rs=[0.0005,0.0005]
new object=transformer.reg1 phases=1 bank=reg1 xhl=0.01 kvas=[1666,1666] buses=[650.1,rg60.1] kvs=[2.4,2.4] %loadloss=0.01
new object=regcontrol.reg1 transformer=reg1 winding=2 vreg=121 band=2 ptratio=20 ctprim=700 r=3 x=9
new object=transformer.reg2 phases=1 bank=reg1 xhl=0.01 kvas=[1666,1666] buses=[650.2,rg60.2] kvs=[2.4,2.4] %loadloss=0.01
new object=regcontrol.reg2 transformer=reg2 winding=2 vreg=121 band=2 ptratio=20 ctprim=700 r=3 x=9
new object=transformer.reg3 phases=1 bank=reg1 xhl=0.01 kvas=[1666,1666] buses=[650.3,rg60.3] kvs=[2.4,2.4] %loadloss=0.01
new object=regcontrol.reg3 transformer=reg3 winding=2 vreg=121 band=2 ptratio=20 ctprim=700 r=3 x=9
new object=transformer.xfm1 phases=3 windings=2 xhl=2 buses=[633.1.2.3,634.1.2.3] conns=[wye,wye] kvs=[4.16,0.480] kvas=[500,500] %rs=[0.55,0.55] xht=1 xlt=1
new object=linecode.mtx601 nphases=3 basefreq=60 rmatrix=[0.3465|0.1560,0.3375|0.1580,0.1535,0.3414] xmatrix=[1.0179|0.5017,1.0478|0.4236,0.3849,1.0348] units=mi
new object=linecode.mtx602 nphases=3 basefreq=60 rmatrix=[0.7526|0.1580,0.7475|0.1560,0.1535,0.7436] xmatrix=[1.1814|0.4236,1.1983|0.5017,0.3849,1.2112] units=mi
new object=linecode.mtx603 nphases=2 basefreq=60 rmatrix=[1.3238|0.2066,1.3294] xmatrix=[1.3569|0.4591,1.3471] units=mi
new object=linecode.mtx604 nphases=2 basefreq=60 rmatrix=[1.3238|0.2066,1.3294] xmatrix=[1.3569|0.4591,1.3471] units=mi
new object=linecode.mtx605 nphases=1 basefreq=60 rmatrix=[1.3292] xmatrix=[1.3475] units=mi
new object=linecode.mtx606 nphases=3 units=mi rmatrix=[0.791721|0.318476,0.781649|0.28345,0.318476,0.791721] xmatrix=[0.438352|0.0276838,0.396697|-0.0184204,0.0276838,0.438352] cmatrix=[383.948|0,383.948|0,0,383.948]
new object=linecode.mtx607 nphases=1 basefreq=60 rmatrix=[1.3425] xmatrix=[0.5124] cmatrix=[236] units=mi
new object=loadshape.solar_634_shape npts=8760 interval=1 useactual=yes mult=[0.0,0.0,0.0,0.0,0.0,0.0,0.0,0.0,1.3827195741509593,4.192388899234553,5.917997653388218,18.18576373350958,4.170273810843715,9.745382284229228,14.579529986576947,15.69665788014842,7.84285282294886,0.5198098871294086,0.0,0.0,0.0,0.0,0.0,0.0]
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new object=loadshape.fossil_634_shape npts=8760 interval=1 useactual=yes mult=[0.0,0.0,0.0,0.0,0.0,0.0,15.803,17.618,31.969000000000005,4.491,14.135999999999996,0.0,70.249,43.942,16.731,8.563,44.612,56.804,59.409,29.802,0.0,0.0,0.0,0.0]
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new object=loadshape.wind_634_shape npts=8760 interval=1 useactual=yes mult=[0.0,0.009,0.0,0.0,0.002,0.007,0.03,0.034,0.021,0.008,0.026,0.065,0.023,0.029,0.101,0.162,0.182,0.117,0.1,0.289,0.463,0.307,0.611,0.979]
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new object=loadshape.battery_634_shape npts=8760 interval=1 useactual=yes mult=[-0.5407548712655602,-0.4334880596642212,-0.4005306484590864,-0.0087422823995534,0.0,0.0,0.0,0.0,0.0,0.0,0.3271898532151054,-0.3641458651768541,0.0,0.0,0.0,0.0,0.0,0.0,0.0,0.4827130702207977,0.9640104867575768,0.5423692131859323,-0.5928856972788065,-0.0853117614842786]
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new object=loadshape.fossil_684_existing_shape npts=8760 interval=1 useactual=yes mult=[0.0,0.0,0.0,0.0,0.0,0.0,7.365612548779177,0.0,0.0,0.0,0.0,0.0,0.0,0.0,0.0,0.0,0.0,18.20302574614022,25.400907775003375,15.073003671097212,0.0,0.0,0.0,0.0]
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new object=loadshape.solar_675_existing_shape npts=8760 interval=1 useactual=yes mult=[0.0,0.0,0.0,0.0,0.0,0.0,0.0,0.0,9.422299451496489,28.56890240968865,40.327759551410445,123.92327677805952,28.417900382089066,66.4091022432742,99.34968365500974,106.96336483608404,53.44393191114211,3.5428708806355935,0.0,0.0,0.0,0.0,0.0,0.0]
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new object=loadshape.solar_634_existing_shape npts=8760 interval=1 useactual=yes mult=[0.0,0.0,0.0,0.0,0.0,0.0,0.0,0.0,5.182280425849042,15.712611100765448,22.180002346611783,68.15823626649042,15.629726189156283,36.52461771577078,54.64247001342304,58.82934211985158,29.394147177051146,1.9481901128705916,0.0,0.0,0.0,0.0,0.0,0.0]
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new object=loadshape.670c_residential2_shape npts=8760 interval=1 useactual=yes mult=[18.97864344,17.35795841,17.0129319,16.89293897,18.95710465,23.34621152,28.40798431,25.83088316,22.85587618,20.22639518,17.34313098,17.4373398,17.29393513,16.86525069,16.71803771,18.01567204,25.21350014,35.28494681,40.71475204,39.76648321,39.3628337,34.34391999,28.39072205,23.49395516]
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new object=loadshape.670b_residential2_shape npts=8760 interval=1 useactual=yes mult=[9.941194189,9.092263929,8.911535758,8.848682315,9.929911963,12.22896794,14.88037273,13.53046261,11.97212562,10.59477843,9.08449718,9.133844658,9.058727927,8.834178932,8.757067371,9.436780588,13.2070715,18.48259119,21.32677488,20.83006263,20.61862718,17.98967237,14.8713306,12.30635747]
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new object=loadshape.670a_residential2_shape npts=8760 interval=1 useactual=yes mult=[2.711234778,2.479708345,2.430418843,2.413276995,2.708157808,3.335173075,4.058283473,3.690126165,3.265125169,2.889485025,2.477590141,2.491048543,2.470562162,2.409321527,2.388291101,2.573667434,3.601928592,5.040706688,5.816393149,5.680926173,5.623261958,4.906274284,4.055817435,3.356279309]
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new object=loadshape.652_residential_shape npts=8760 interval=1 useactual=yes mult=[20.7861333,19.01109731,18.63321113,18.50179029,20.76254319,25.56966024,31.11350662,28.29096726,25.03262629,22.15271853,18.99485774,19.09803883,18.94097657,18.47146504,18.31023177,19.73145033,27.61478587,38.64541793,44.59234747,43.55376731,43.11167501,37.61476952,31.09460035,25.7314747]
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new object=loadshape.611_runway_shape npts=8760 interval=1 useactual=yes mult=[48.60427995,51.57608556,44.96393543,43.6071395,44.02403735,47.66907666,71.63600823,76.46836135,105.6643563,90.75791073,64.12903006,60.10230386,59.89526338,59.99009825,59.82437196,59.48775512,62.37364598,75.43221996,103.5723553,108.7281799,114.7408046,111.4666541,85.67344709,54.98920197]
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new object=loadshape.675c_residential1_shape npts=8760 interval=1 useactual=yes mult=[43.37975645,39.67533352,38.88670148,38.61243191,43.33052492,53.36276919,64.93253556,59.04201863,52.2420027,46.2317604,39.64144225,39.85677668,39.52899458,38.54914442,38.21265761,41.17867894,57.63085747,80.651307,93.06229038,90.89481876,89.97219132,78.50038854,64.89307896,53.70046895]
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new object=loadshape.675b_residential1_shape npts=8760 interval=1 useactual=yes mult=[10.84493911,9.918833379,9.721675371,9.653107979,10.83263123,13.3406923,16.23313389,14.76050466,13.06050068,11.5579401,9.910360562,9.96419417,9.882248645,9.637286106,9.553164404,10.29466974,14.40771437,20.16282675,23.2655726,22.72370469,22.49304783,19.62509714,16.22326974,13.42511724]
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new object=loadshape.675a_hospital_shape npts=8760 interval=1 useactual=yes mult=[159.023675,160.9194375,162.9458125,163.4360125,171.4727125,170.579925,194.715825,196.1332125,214.3329625,212.152325,214.014225,214.8586375,213.6503375,211.4971125,212.1001875,212.2523,205.9705375,194.4422375,184.2722,182.8214875,172.781525,171.7205,163.1764,163.282825]
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new object=loadshape.692_warehouse2_shape npts=8760 interval=1 useactual=yes mult=[33.699,32.89233333,32.89233333,32.89233333,32.89233333,32.89233333,32.89233333,13.1,9.141666667,9.141666667,9.141666667,9.141666667,9.141666667,9.141666667,9.141666667,9.141666667,9.141666667,21.017,32.89233333,32.89233333,32.89233333,32.92833333,34.41233333,35.19066667]
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new object=loadshape.646_office_shape npts=8760 interval=1 useactual=yes mult=[29.11833872,29.11833872,29.11833872,29.11833872,29.11833872,29.11833872,29.11833872,17.77832471,15.51038129,15.51038129,15.51038129,15.51038129,15.51038129,15.51038129,15.51038129,15.51038129,15.51038129,22.31421155,29.11833872,29.11833872,29.11833872,29.11833872,29.11833872,29.11833872]
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new object=loadshape.645_hangar_shape npts=8760 interval=1 useactual=yes mult=[33.699,32.89233333,32.89233333,32.89233333,32.89233333,32.89233333,32.89233333,13.1,9.141666667,9.141666667,9.141666667,9.141666667,9.141666667,9.141666667,9.141666667,9.141666667,9.141666667,21.017,32.89233333,32.89233333,32.89233333,32.92833333,34.41233333,35.19066667]
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new object=loadshape.634c_atc_tower_shape npts=8760 interval=1 useactual=yes mult=[12.91677778,13.59177778,13.79744444,13.87977778,14.76244444,14.65966667,18.78311111,19.06688889,22.32755556,20.12022222,24.96077778,27.50533333,30.364,30.39033333,29.73711111,29.30011111,29.10955556,25.57766667,25.59622222,24.03911111,22.44044444,19.76766667,12.68455556,15.93011111]
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new object=loadshape.634b_radar_shape npts=8760 interval=1 useactual=yes mult=[31.13513143,32.76217914,33.25792651,33.45638616,35.58400213,35.33626236,45.27558212,45.95961173,53.81925653,48.49860964,60.16648347,66.29998464,73.19063213,73.25410708,71.67955342,70.62619068,70.16686775,61.65345777,61.69818485,57.9448603,54.09136853,47.64879526,30.57537345,38.3985938]
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new object=loadshape.634a_data_center_shape npts=8760 interval=1 useactual=yes mult=[38.75033333,40.77533333,41.39233333,41.63933333,44.28733333,43.979,56.34933333,57.20066667,66.98266667,60.36066667,74.88233333,82.516,91.092,91.171,89.21133333,87.90033333,87.32866667,76.733,76.78866667,72.11733333,67.32133333,59.303,38.05366667,47.79033333]
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new object=loadshape.684_command_center_shape npts=8760 interval=1 useactual=yes mult=[295.858,299.385,303.155,304.067,319.019,317.358,362.262,364.899,398.759,394.702,398.166,399.737,397.489,393.483,394.605,394.888,383.201,361.753,342.832,340.133,321.454,319.48,303.584,303.782]
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new object=load.684_command_center bus1=684.3 phases=1 conn=wye model=1 kv=2.4 kw=400 kvar=660 yearly=684_command_center_shape
new object=load.634a_data_center bus1=634.1 phases=1 conn=wye model=1 kv=0.277 kw=70 kvar=110 yearly=634a_data_center_shape
new object=load.634b_radar bus1=634.1 phases=1 conn=wye model=1 kv=0.277 kw=90 kvar=90 yearly=634b_radar_shape
new object=load.634c_atc_tower bus1=634.1 phases=1 conn=wye model=1 kv=0.277 kw=10 kvar=90 yearly=634c_atc_tower_shape
new object=load.645_hangar bus1=645.2 phases=1 conn=wye model=1 kv=2.4 kw=30 kvar=125 yearly=645_hangar_shape
new object=load.646_office bus1=646.2 phases=1 conn=wye model=2 kv=2.4 kw=70 kvar=132 yearly=646_office_shape
new object=load.692_warehouse2 bus1=692.1.2.3 phases=3 conn=delta model=5 kv=2.4 kw=0 kvar=151 yearly=692_warehouse2_shape
new object=load.675a_hospital bus1=675.1.2.3 phases=3 conn=wye model=1 kv=2.4 kw=150 kvar=190 yearly=675a_hospital_shape
new object=load.675b_residential1 bus1=675.1.2.3 phases=3 conn=wye model=1 kv=2.4 kw=200 kvar=60 yearly=675b_residential1_shape
new object=load.675c_residential1 bus1=675.1.2.3 phases=3 conn=wye model=1 kv=2.4 kw=200 kvar=212 yearly=675c_residential1_shape
new object=load.611_runway bus1=611.3 phases=1 conn=wye model=5 kv=2.4 kw=0 kvar=80 yearly=611_runway_shape
new object=load.652_residential bus1=652.3 phases=1 conn=wye model=2 kv=2.4 kw=20 kvar=86 yearly=652_residential_shape
new object=load.670a_residential2 bus1=670.1 phases=1 conn=wye model=1 kv=2.4 kw=17 kvar=10 yearly=670a_residential2_shape
new object=load.670b_residential2 bus1=670.2 phases=1 conn=wye model=1 kv=2.4 kw=66 kvar=38 yearly=670b_residential2_shape
new object=load.670c_residential2 bus1=670.3 phases=1 conn=wye model=1 kv=2.4 kw=117 kvar=68 yearly=670c_residential2_shape
new object=generator.solar_634_existing bus1=634.1 phases=1 kv=0.277 kw=440 pf=1 yearly=solar_634_existing_shape
new object=generator.solar_675_existing bus1=675.1.2.3 phases=3 kv=2.4 kw=800 pf=1 yearly=solar_675_existing_shape
new object=generator.fossil_684_existing bus1=684.3 phases=1 kw=81 pf=1 kv=2.4 xdp=0.27 xdpp=0.2 h=2 yearly=fossil_684_existing_shape
new object=capacitor.cap1 bus1=675 phases=3 kvar=600 kv=2.4
new object=capacitor.cap2 bus1=611.3 phases=1 kvar=100 kv=2.4
new object=line.670671 phases=3 bus1=670.1.2.3 bus2=671.1.2.3 linecode=mtx601 length=1333 units=ft
new object=line.645646 phases=1 bus1=645.2 bus2=646.2 linecode=mtx603 length=300 units=ft
new object=line.692675 phases=3 bus1=692.1.2.3 bus2=675.1.2.3 linecode=mtx606 length=500 units=ft
new object=line.684611 phases=1 bus1=684.3 bus2=611.3 linecode=mtx605 length=300 units=ft
new object=line.684652 phases=1 bus1=684.3 bus2=652.3 linecode=mtx607 length=800 units=ft
new object=line.671692 phases=3 bus1=671.1.2.3 bus2=692.1.2.3 switch=y r1=1e-4 r0=1e-4 x1=0.000 x0=0.000 c1=0.000 c0=0.000
new object=line.632633 phases=1 bus1=632.1 bus2=633.1 switch=y linecode=mtx602 length=500 units=ft
new object=line.671684 phases=1 bus1=671.3 bus2=684.3 switch=y linecode=mtx604 length=300 units=ft
new object=line.632645 phases=1 bus1=632.2 bus2=645.2 switch=y linecode=mtx603 length=500 units=ft
new object=line.632670 phases=3 bus1=632.1.2.3 bus2=670.1.2.3 switch=y linecode=mtx601 length=667 units=ft
new object=line.650632 phases=3 bus1=rg60.1.2.3 bus2=632.1.2.3 switch=y linecode=mtx601 length=2000 units=ft
new object=line.671680 phases=3 bus1=671.1.2.3 bus2=680.1.2.3 switch=y linecode=mtx601 length=1000 units=ft
open object=line.671680 term=1
new object=storage.battery_634 bus1=634.1 phases=1 kv=0.27712812921102037 kwrated=40.26408481359285 dispmode=follow kwhstored=105.61097755535593 kwhrated=105.61097755535593 %charge=100 %discharge=100 %effcharge=96 %effdischarge=96 %idlingkw=0 yearly=battery_634_shape
new object=generator.wind_634 bus1=634.1 phases=1 kv=0.27712812921102037 kw=1.0 pf=1 yearly=wind_634_shape
new object=line.line_for_lead_gen_634_1 bus1=634.1 bus2=bus_for_lead_gen_634_1.1.2.3 switch=yes
new object=vsource.lead_gen_634_1 basekv=0.27712812921102037 bus1=bus_for_lead_gen_634_1.1.2.3 phases=1
new object=generator.solar_634 bus1=634.1 phases=1 kv=0.27712812921102037 kw=117.39940000000001 pf=1 yearly=solar_634_shape
new object=loadshape.solar_675_shape npts=8760 interval=1 useactual=yes mult=[0.0,0.0,0.0,0.0,0.0,0.0,0.0,0.0,7.175700548503512,21.757097590311343,30.71224044858956,94.37572322194048,21.642099617910944,50.5748977567258,75.66131634499024,81.45963516391598,40.70106808885788,2.6981291193644066,0.0,0.0,0.0,0.0,0.0,0.0]
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new object=loadshape.fossil_675_shape npts=8760 interval=1 useactual=yes mult=[212.398,130.514,131.564,131.712,145.644,157.287,195.862,170.119,159.276,115.868,88.76,0.0,109.238,38.93,0.0,0.0,79.94200000000001,197.033,220.51,216.161,204.794,189.586,165.212,151.738]
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new object=loadshape.wind_675_shape npts=8760 interval=1 useactual=yes mult=[0.0,0.009,0.0,0.0,0.002,0.007,0.03,0.034,0.021,0.008,0.026,0.065,0.023,0.029,0.101,0.162,0.182,0.117,0.1,0.289,0.463,0.307,0.611,0.979]
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new object=loadshape.battery_675_shape npts=8760 interval=1 useactual=yes mult=[-0.4992238168982206,0.0,0.0,0.0,0.0,0.0,0.0,0.0,0.0,0.0,0.0,-0.3659751022606094,0.0,0.0,-0.1209996219681311,-0.1822705777040214,0.0,0.0,0.0,0.0,0.0,0.0,0.0,0.0]
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new object=storage.battery_675 bus1=675.1.2.3 phases=3 kv=2.4017771198288433 kwrated=156.90958113076195 dispmode=follow kwhstored=347.59187092080566 kwhrated=347.59187092080566 %charge=100 %discharge=100 %effcharge=96 %effdischarge=96 %idlingkw=0 yearly=battery_675_shape
new object=generator.wind_675 bus1=675.1.2.3 phases=3 kv=2.4017771198288433 kw=1.0 pf=1 yearly=wind_675_shape
new object=line.line_for_lead_gen_675_1_2_3 bus1=675.1.2.3 bus2=bus_for_lead_gen_675_1_2_3.1.2.3 switch=yes
new object=vsource.lead_gen_675_1_2_3 basekv=4.16 bus1=bus_for_lead_gen_675_1_2_3.1.2.3 phases=3
new object=generator.solar_675 bus1=675.1.2.3 phases=3 kv=2.4017771198288433 kw=609.2526 pf=1 yearly=solar_675_shape
new object=loadshape.solar_684_shape npts=8760 interval=1 useactual=yes mult=[0.0,0.0,0.0,0.0,0.0,0.0,0.0,0.0,20.223,61.315,86.552,265.967,60.991,142.529,213.227,229.567,114.703,7.604,0.0,0.0,0.0,0.0,0.0,0.0]
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new object=loadshape.fossil_684_shape npts=8760 interval=1 useactual=yes mult=[0.0,0.0,0.0,0.0,0.0,0.0,15.952387451220822,0.0,0.0,0.0,0.0,0.0,0.0,0.0,0.0,0.0,0.0,39.42397425385978,55.01309222499662,32.64499632890279,0.0,0.0,0.0,0.0]
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new object=loadshape.wind_684_shape npts=8760 interval=1 useactual=yes mult=[0.0,0.009,0.0,0.0,0.002,0.007,0.03,0.034,0.021,0.008,0.026,0.065,0.023,0.029,0.101,0.162,0.182,0.117,0.1,0.289,0.463,0.307,0.611,0.979]
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new object=loadshape.battery_684_shape npts=8760 interval=1 useactual=yes mult=[-0.3494315565702826,-0.313009100745614,-0.3378134497706428,-0.2079208528052553,0.0,0.0,0.2408671463560955,0.4568526956366327,0.7626622780728955,0.2766020945310514,-0.1218279004901056,-0.999999188519792,0.0372953587956521,-0.6264507905741934,-0.226305888831281,0.0,0.0,0.0,0.0,0.2620640114213957,0.528067673419797,0.4462774375191415,0.0715162451802293,-0.2082530194225323]
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new object=storage.battery_684 bus1=684.3 phases=1 kv=2.4017771198288433 kwrated=129.4531050486326 dispmode=follow kwhstored=296.5138764568884 kwhrated=296.5138764568884 %charge=100 %discharge=100 %effcharge=96 %effdischarge=96 %idlingkw=0 yearly=battery_684_shape
new object=generator.wind_684 bus1=684.3 phases=1 kv=2.4017771198288433 kw=1.0 pf=1 yearly=wind_684_shape
new object=line.line_for_lead_gen_684_3 bus1=684.3 bus2=bus_for_lead_gen_684_3.1.2.3 switch=yes
new object=vsource.lead_gen_684_3 basekv=2.4017771198288433 bus1=bus_for_lead_gen_684_3.1.2.3 phases=1
new object=generator.solar_684 bus1=684.3 phases=1 kv=2.4017771198288433 kw=1716.9797 pf=1 yearly=solar_684_shape
new object=loadshape.solar_646_shape npts=8760 interval=1 useactual=yes mult=[0.0,0.0,0.0,0.0,0.0,0.0,0.0,0.0,6.787999999999999,20.58,29.051,89.271,20.472,47.84,70.989,24.651999999999997,24.651999999999997,2.5520000000000005,0.0,0.0,0.0,0.0,0.0,0.0]
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new object=loadshape.fossil_646_shape npts=8760 interval=1 useactual=yes mult=[10.592,9.776,3.724,0.0,0.0,0.0,0.0,0.0,0.0,0.0,0.0,0.0,0.0,0.0,0.0,0.0,0.0,0.0,9.686,9.497,9.322,9.515,10.694,11.105]
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new object=loadshape.wind_646_shape npts=8760 interval=1 useactual=yes mult=[0.0,0.009,0.0,0.0,0.002,0.007,0.03,0.034,0.021,0.008,0.026,0.065,0.023,0.029,0.0,0.0,0.0,0.117,0.1,0.289,0.463,0.307,0.611,0.979]
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new object=loadshape.battery_646_shape npts=8760 interval=1 useactual=yes mult=[0.0,0.0,0.082259294967942,0.1327791490038458,0.1327520096785512,0.1326977310279619,0.1323720591244267,0.0,0.0,0.0,-0.0600457572143094,-0.8777400586780543,0.0564226572874799,-0.3150332880197531,-0.6287774580880126,0.0,0.0,0.0,0.0,0.0,0.0,0.0,0.0,0.0]
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new object=storage.battery_646 bus1=646.2 phases=1 kv=2.4017771198288433 kwrated=73.69379961696086 dispmode=follow kwhstored=158.81766144864366 kwhrated=158.81766144864366 %charge=100 %discharge=100 %effcharge=96 %effdischarge=96 %idlingkw=0 yearly=battery_646_shape
new object=generator.wind_646 bus1=646.2 phases=1 kv=2.4017771198288433 kw=1.0 pf=1 yearly=wind_646_shape
new object=line.line_for_lead_gen_646_2 bus1=646.2 bus2=bus_for_lead_gen_646_2.1.2.3 switch=yes
new object=vsource.lead_gen_646_2 basekv=2.4017771198288433 bus1=bus_for_lead_gen_646_2.1.2.3 phases=1
new object=generator.solar_646 bus1=646.2 phases=1 kv=2.4017771198288433 kw=576.2989 pf=1 yearly=solar_646_shape
makebuslist
setbusxy bus=sourcebus y=30.285013 x=-84.071493
setbusxy bus=650 y=30.285013 x=-84.071993
setbusxy bus=rg60 y=30.285013 x=-84.072493
setbusxy bus=646 y=30.283013 x=-84.072993
setbusxy bus=645 y=30.284013 x=-84.072993
setbusxy bus=632 y=30.285013 x=-84.072993
setbusxy bus=633 y=30.286513 x=-84.072993
setbusxy bus=634 y=30.287013 x=-84.072993
setbusxy bus=670 y=30.285013 x=-84.073493
setbusxy bus=611 y=30.283013 x=-84.074493
setbusxy bus=684 y=30.284013 x=-84.074493
setbusxy bus=671 y=30.285013 x=-84.074493
setbusxy bus=692 y=30.285513 x=-84.074493
setbusxy bus=675 y=30.287013 x=-84.074493
setbusxy bus=652 y=30.284013 x=-84.075493
setbusxy bus=680 y=30.285013 x=-84.075493
set voltagebases=[115,4.16,0.48]
calcvoltagebases
