clear
 New Circuit.PVSystem  basekv=12.47  Isc3=1000 Isc1=900

 // P-T curve is per unit of rated Pmpp vs temperature
// This one is for a Pmpp stated at 25 deg
New XYCurve.MyPvsT npts=4  xarray=[0  25  75  100]  yarray=[1.2 1.0 0.8  0.6]

 // efficiency curve is per unit eff vs per unit power
New XYCurve.MyEff npts=4  xarray=[.1  .2  .4  1.0]  yarray=[.86  .9  .93  .97]

// per unit irradiance curve (per unit if "irradiance" property)
New Loadshape.MyIrrad npts=8760 interval=1 mult=[0.294571,0.312582,0.272509,0.264286,0.266812,0.288903,0.434158,0.463445,0.64039,0.550048,0.388661,0.364256,0.363002,0.363576,0.362572,0.360532,0.378022,0.457165,0.627711,0.658959,0.695399,0.675555,0.519233,0.333268]
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
// 24-hr temp shape curve
New Tshape.MyTemp npts=24 interval=1 temp=[25, 25, 25, 25, 25, 25, 25, 25, 35, 40, 45, 50  60 60  55 40  35  30  25 25 25 25 25 25]

// **** plot tshape object=mytemp

// take the default line
New Line.line1 Bus1=sourcebus bus2=PVbus  Length=2

// pv definition
New PVSystem.PV phases=3 bus1=PVbus kV=12.47  kVA=500  irrad=1  Pmpp=500
~ temperature=25 PF=1  effcurve=Myeff  P-TCurve=MyPvsT
~ Yearly=MyIrrad  Tyearly=MyTemp

set voltagebases=[12.47]
calcv

!solve  ! solves at the specified irradiance and temperature

new monitor.m1 PVSystem.PV  1 mode=1 ppolar=no
new monitor.m2 PVSystem.PV  1

!solve

solve mode=yearly

!show mon m1 show mon m2
Export monitors m1
!Plot monitor object= m1 channels=(1 )
Export monitors m2
!Plot monitor object= m2 channels=(1 ) base=[7200]
!Export monitors m2
!Plot monitor object= m2 channels=(9 )

! swing stuff
!new object=monitor.master element=vsource.source terminal=1 mode=1 ppolar=no
!set mode=yearly stepsize=1h number=1
!solve
!solve
!solve
!export monitors monitorname=master
!solve
!solve
!solve
!solve
!solve
!solve
!export monitors monitorname=master
