clear
set defaultbasefrequency=60

! around 3.5 mw of load
new object=circuit.lehigh basekv=115 pu=1.0001 phases=3 bus1=sourcebus angle=30 mvasc3=20000 mvasc1=21000
edit object=vsource.source basekv=115 bus1=sourcebus.1.2.3 pu=1.00 r1=0 x1=0.0001 r0=0 x0=0.0001

!sub transformer definition
new object=transformer.sub phases=3 windings=2 xhl=0.008 windings=2 buses=[sourcebus.1.2.3,650.1.2.3] conns=[delta,wye] kvs=[115,4.16] kvas=[5000,5000] %rs=[0.0005,0.0005]

! feeder 1-phase voltage regulators
! define low-impedance 2-wdg transformer

new object=transformer.reg1 phases=1 bank=reg1 xhl=0.01 kvas=[1666,1666] buses=[650.1,rg60.1] kvs=[2.4,2.4] %loadloss=0.01
new object=regcontrol.reg1 transformer=reg1 winding=2 vreg=122 band=2 ptratio=20 ctprim=700 r=3 x=9

new object=transformer.reg2 phases=1 bank=reg1 xhl=0.01 kvas=[1666,1666] buses=[650.2,rg60.2] kvs=[2.4,2.4] %loadloss=0.01
new object=regcontrol.reg2 transformer=reg2 winding=2 vreg=122 band=2 ptratio=20 ctprim=700 r=3 x=9

new object=transformer.reg3 phases=1 bank=reg1 xhl=0.01 kvas=[1666,1666] buses=[650.3,rg60.3] kvs=[2.4,2.4] %loadloss=0.01
new object=regcontrol.reg3 transformer=reg3 winding=2 vreg=122 band=2 ptratio=20 ctprim=700 r=3 x=9

!transformer definition
new object=transformer.xfm1 phases=3 windings=2 xhl=2 buses=[633.1.2.3,634.1.2.3] conns=[wye,wye] kvs=[4.16,0.480] kvas=[500,500] %rs=[0.55,0.55] xht=1 xlt=1

! these are local matrix line codes
new object=linecode.mtx601 nphases=3 basefreq=60 rmatrix=[0.3465|0.1560,0.3375|0.1580,0.1535,0.3414] xmatrix=[1.0179|0.5017,1.0478|0.4236,0.3849,1.0348] units=mi
new object=linecode.mtx602 nphases=3 basefreq=60 rmatrix=[0.7526|0.1580,0.7475|0.1560,0.1535,0.7436] xmatrix=[1.1814|0.4236,1.1983|0.5017,0.3849,1.2112] units=mi
new object=linecode.mtx603 nphases=2 basefreq=60 rmatrix=[1.3238|0.2066,1.3294] xmatrix=[1.3569|0.4591,1.3471] units=mi
new object=linecode.mtx604 nphases=2 basefreq=60 rmatrix=[1.3238|0.2066,1.3294] xmatrix=[1.3569|0.4591,1.3471] units=mi
new object=linecode.mtx605 nphases=1 basefreq=60 rmatrix=[1.3292] xmatrix=[1.3475] units=mi
new object=linecode.mtx606 nphases=3 units=mi rmatrix=[0.791721|0.318476,0.781649|0.28345,0.318476,0.791721] xmatrix=[0.438352|0.0276838,0.396697|-0.0184204,0.0276838,0.438352] cmatrix=[383.948|0,383.948|0,0,383.948]
new object=linecode.mtx607 nphases=1 basefreq=60 rmatrix=[1.3425] xmatrix=[0.5124] cmatrix=[236] units=mi

!loadshape definitions for microgrid m1 represent residential loads
new object=loadshape.634a_loadcurve npts=8760 interval=1 useactual=no mult=[0.180749,0.165314,0.162028,0.160885,0.180544,0.222345,0.270552,0.246008,0.217675,0.192632,0.165173,0.16607,0.164704,0.160621,0.159219,0.171578,0.240129,0.336047,0.38776,0.378728,0.374884,0.327085,0.270388,0.223752]
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new object=loadshape.634b_loadcurve npts=8760 interval=1 useactual=no mult=[0.180749,0.165314,0.162028,0.160885,0.180544,0.222345,0.270552,0.246008,0.217675,0.192632,0.165173,0.16607,0.164704,0.160621,0.159219,0.171578,0.240129,0.336047,0.38776,0.378728,0.374884,0.327085,0.270388,0.223752]
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new object=loadshape.634c_loadcurve npts=8760 interval=1 useactual=no mult=[0.180749,0.165314,0.162028,0.160885,0.180544,0.222345,0.270552,0.246008,0.217675,0.192632,0.165173,0.16607,0.164704,0.160621,0.159219,0.171578,0.240129,0.336047,0.38776,0.378728,0.374884,0.327085,0.270388,0.223752]
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
!loadshape definitions for microgrid m2
new object=loadshape.675a_loadcurve npts=8760 interval=1 useactual=no mult=[0.369408,0.373812,0.378519,0.379658,0.398327,0.396253,0.45232,0.455613,0.49789,0.492825,0.49715,0.499112,0.496305,0.491303,0.492704,0.493057,0.478465,0.451685,0.42806,0.42469,0.401367,0.398903,0.379055,0.379302]
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new object=loadshape.675b_loadcurve npts=8760 interval=1 useactual=no mult=[0.27074,0.284889,0.289199,0.290925,0.309426,0.307272,0.393701,0.399649,0.467994,0.421727,0.523187,0.576522,0.63644,0.636992,0.6233,0.614141,0.610147,0.536117,0.536506,0.503868,0.47036,0.414337,0.265873,0.333901]
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new object=loadshape.675c_loadcurve npts=8760 interval=1 useactual=no mult=[0.129415,0.129415,0.129415,0.129415,0.129415,0.129415,0.129415,0.079015,0.068935,0.068935,0.068935,0.068935,0.068935,0.068935,0.068935,0.068935,0.068935,0.099174,0.129415,0.129415,0.129415,0.129415,0.129415,0.129415]
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
!loadshape definitions for microgrid m3
new object=loadshape.611_loadcurve npts=8760 interval=1 useactual=no mult=[0.21073,0.205686,0.205686,0.205686,0.205686,0.205686,0.205686,0.081918,0.057166,0.057166,0.057166,0.057166,0.057166,0.057166,0.057166,0.057166,0.057166,0.131426,0.205686,0.205686,0.205686,0.205911,0.215191,0.220058]
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new object=loadshape.652_loadcurve npts=8760 interval=1 useactual=no mult=[0.27074,0.284889,0.289199,0.290925,0.309426,0.307272,0.393701,0.399649,0.467994,0.421727,0.523187,0.576522,0.63644,0.636992,0.6233,0.614141,0.610147,0.536117,0.536506,0.503868,0.47036,0.414337,0.265873,0.333901]
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
!loadshape definitions for microgrid m2
new object=loadshape.645_loadcurve npts=8760 interval=1 useactual=no mult=[0.294571,0.312582,0.272509,0.264286,0.266812,0.288903,0.434158,0.463445,0.64039,0.550048,0.388661,0.364256,0.363002,0.363576,0.362572,0.360532,0.378022,0.457165,0.627711,0.658959,0.695399,0.675555,0.519233,0.333268]
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new object=loadshape.646_loadcurve npts=8760 interval=1 useactual=no mult=[0.27074,0.284889,0.289199,0.290925,0.309426,0.307272,0.393701,0.399649,0.467994,0.421727,0.523187,0.576522,0.63644,0.636992,0.6233,0.614141,0.610147,0.536117,0.536506,0.503868,0.47036,0.414337,0.265873,0.333901]
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
!load definitions
new object=load.671 bus1=671.1.2.3 phases=3 conn=delta model=1 kv=4.16 kw=1155 kvar=660
new object=load.634a bus1=634.1 phases=1 conn=wye model=1 kv=0.277 kw=160 kvar=110 yearly=634a_loadcurve
new object=load.634b bus1=634.2 phases=1 conn=wye model=1 kv=0.277 kw=120 kvar=90 yearly=634b_loadcurve
new object=load.634c bus1=634.3 phases=1 conn=wye model=1 kv=0.277 kw=120 kvar=90 yearly=634c_loadcurve
new object=load.645 bus1=645.2 phases=1 conn=wye model=1 kv=2.4 kw=170 kvar=125 yearly=645_loadcurve
new object=load.646 bus1=646.2.3 phases=1 conn=delta model=2 kv=4.16 kw=230 kvar=132 yearly=646_loadcurve
new object=load.692 bus1=692.3.1 phases=1 conn=delta model=5 kv=4.16 kw=170 kvar=151
new object=load.675a bus1=675.1 phases=1 conn=wye model=1 kv=2.4 kw=485 kvar=190 yearly=675a_loadcurve
new object=load.675b bus1=675.2 phases=1 conn=wye model=1 kv=2.4 kw=68 kvar=60 yearly=675b_loadcurve
new object=load.675c bus1=675.3 phases=1 conn=wye model=1 kv=2.4 kw=290 kvar=212 yearly=675c_loadcurve
new object=load.611 bus1=611.3 phases=1 conn=wye model=5 kv=2.4 kw=170 kvar=80 yearly=611_loadcurve
new object=load.652 bus1=652.1 phases=1 conn=wye model=2 kv=2.4 kw=128 kvar=86 yearly=652_loadcurve
new object=load.670a bus1=670.1 phases=1 conn=wye model=1 kv=2.4 kw=17 kvar=10
new object=load.670b bus1=670.2 phases=1 conn=wye model=1 kv=2.4 kw=66 kvar=38
new object=load.670c bus1=670.3 phases=1 conn=wye model=1 kv=2.4 kw=117 kvar=68

!loadshape definitions for DER
new object=loadshape.solar_2017 npts=8760 interval=1 useactual=no mult=[0.0,0.0,0.0,0.0,0.0,0.0,0.0,0.0,0.0,0.149872,0.210805,0.184635,0.18092,0.20635,0.182447,0.063327,0.003525,0.0,0.0,0.0,0.0,0.0,0.0,0.0]
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new object=loadshape.diesel_flat npts=8760 interval=1 useactual=no mult=[1.0,1.0,1.0,1.0,1.0,1.0,1.0,1.0,1.0,1.0,1.0,1.0,1.0,1.0,1.0,1.0,1.0,1.0,1.0,1.0,1.0,1.0,1.0,1.0]
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new object=loadshape.battery_2017 npts=8760 interval=1 useactual=no mult=[0.750021,0.0,0.0,0.0,0.0,0.0,0.0,0.0,0.0,0.0,0.0,0.366434,0.0,0.0,0.473304,0.0,0.0,0.0,0.0,0.0,0.0,0.0,0.0,0.0]
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
! generator definitions
!new object=generator.solar_gen bus1=671.1.2.3 kv=4.16 kw=20 pf=1 duty=solarramp
!new object=generator.diesel bus1=671.1.2.3 kw=100 pf=1 kva=0 kv=4.16 xdp=0.27 xdpp=0.2 h=2 conn=delta duty=dieselshape
!new object=storage.bat1 phases=3 bus1=671.1.2.3 kv=4.16 kwhstored=200 kwhrated=200 kva=100 kvar=100 %charge=100 %discharge=100 %effcharge=100 %effdischarge=100 %idlingkw=1 %r=0 %x=50

! microgrid m1 generator definitions
new object=generator.solar_634 bus1=634.1.2.3 kv=4.16 kw=440 pf=1 yearly=solar_2017
new object=generator.diesel_634 bus1=634.1.2.3 kw=165 pf=1 kv=4.16 xdp=0.27 xdpp=0.2 h=2 conn=delta yearly=diesel_flat
new object=storage.battery_634 phases=3 bus1=634.1.2.3 kv=4.16 kwhstored=307 kwhrated=307 kva=79 kvar=79 %charge=100 %discharge=100 %effcharge=100 %effdischarge=100 %idlingkw=1 %r=0 %x=50 yearly=battery_2017

! microgrid m2 generator definitions
new object=generator.solar_675 bus1=675.1.2.3 kv=4.16 kw=1234 pf=1 yearly=solar_2017
new object=generator.diesel_675 bus1=675.1.2.3 kw=265 pf=1 kv=4.16 xdp=0.27 xdpp=0.2 h=2 conn=delta yearly=diesel_flat
new object=storage.battery_675 phases=3 bus1=675.1.2.3 kv=4.16 kwhstored=553 kwhrated=553 kva=198 kvar=198 %charge=100 %discharge=100 %effcharge=100 %effdischarge=100 %idlingkw=1 %r=0 %x=50 yearly=battery_2017

! microgrid m3 generator definitions
! new object=generator.solar_684 bus1=684 kv=4.16 kw=432 pf=1 yearly=solar_2017
new object=generator.diesel_684 bus1=684 kw=81 pf=1 kv=4.16 xdp=0.27 xdpp=0.2 h=2 conn=delta yearly=diesel_flat
new object=storage.battery_684 phases=3 bus1=684 kv=4.16 kwhstored=225 kwhrated=225 kva=83 kvar=83 %charge=100 %discharge=100 %effcharge=100 %effdischarge=100 %idlingkw=1 %r=0 %x=50 yearly=battery_2017

! microgrid m4 generator definitions
new object=generator.solar_646 bus1=646.2.3 kv=4.16 kw=590 pf=1 yearly=solar_2017
new object=generator.diesel_646 bus1=646.2.3 kw=145 pf=1 kv=4.16 xdp=0.27 xdpp=0.2 h=2 conn=delta yearly=diesel_flat
new object=storage.battery_646 phases=3 bus1=646.2.3 kv=4.16 kwhstored=346 kwhrated=346 kva=98 kvar=98 %charge=100 %discharge=100 %effcharge=100 %effdischarge=100 %idlingkw=1 %r=0 %x=50 yearly=battery_2017

!capacitor definitions
new object=capacitor.cap1 bus1=675 phases=3 kvar=600 kv=4.16
new object=capacitor.cap2 bus1=611.3 phases=1 kvar=100 kv=2.4

!line definitions
new object=line.670671 phases=3 bus1=670.1.2.3 bus2=671.1.2.3 linecode=mtx601 length=1333 units=ft
new object=line.671680 phases=3 bus1=671.1.2.3 bus2=680.1.2.3 linecode=mtx601 length=1000 units=ft
new object=line.645646 phases=2 bus1=645.3.2 bus2=646.3.2 linecode=mtx603 length=300 units=ft
new object=line.692675 phases=3 bus1=692.1.2.3 bus2=675.1.2.3 linecode=mtx606 length=500 units=ft
new object=line.684611 phases=1 bus1=684.3 bus2=611.3 linecode=mtx605 length=300 units=ft
new object=line.684652 phases=1 bus1=684.1 bus2=652.1 linecode=mtx607 length=800 units=ft

!microgrid switch definitions
new object=line.671692 phases=3 bus1=671.1.2.3 bus2=692.1.2.3 switch=y r1=1e-4 r0=1e-4 x1=0.000 x0=0.000 c1=0.000 c0=0.000
new object=line.632633 phases=3 bus1=632.1.2.3 bus2=633.1.2.3 switch=y linecode=mtx602 length=500 units=ft
new object=line.671684 phases=2 bus1=671.1.3 bus2=684.1.3 switch=y linecode=mtx604 length=300 units=ft
new object=line.632645 phases=2 bus1=632.3.2 bus2=645.3.2 switch=y linecode=mtx603 length=500 units=ft

! other switch definitions
new object=line.632670 phases=3 bus1=632.1.2.3 bus2=670.1.2.3 switch=y linecode=mtx601 length=667 units=ft
new object=line.650632 phases=3 bus1=rg60.1.2.3 bus2=632.1.2.3 switch=y linecode=mtx601 length=2000 units=ft

! bus coords
makebuslist
!rough lat/lon coords
setbusxy bus=sourcebus y=30.285013 x=-84.071493
setbusxy bus=650 y=30.285013 x=-84.071993
setbusxy bus=rg60 y=30.285013 x=-84.072493
setbusxy bus=646 y=30.283013 x=-84.072993
setbusxy bus=645 y=30.284013 x=-84.072993
setbusxy bus=632 y=30.285013 x=-84.072993
setbusxy bus=633 y=30.286513 x=-84.072993
setbusxy bus=634 y=30.287013 x=-84.072993
setbusxy bus=670 y=30.285013 x=-84.073493
setbusxy bus=611 y=30.283013 x=-84.074493
setbusxy bus=684 y=30.284013 x=-84.074493
setbusxy bus=671 y=30.285013 x=-84.074493
setbusxy bus=692 y=30.285513 x=-84.074493
setbusxy bus=675 y=30.287013 x=-84.074493
setbusxy bus=652 y=30.284013 x=-84.075493
setbusxy bus=680 y=30.285013 x=-84.075493
!map feet coords
!setbusxy bus=sourcebus x=200 y=400
!setbusxy bus=650 x=200 y=350
!setbusxy bus=rg60 x=200 y=300
!setbusxy bus=646 x=0 y=250
!setbusxy bus=645 x=100 y=250
!setbusxy bus=632 x=200 y=250
!setbusxy bus=633 x=350 y=250
!setbusxy bus=634 x=400 y=250
!setbusxy bus=670 x=200 y=200
!setbusxy bus=611 x=0 y=100
!setbusxy bus=684 x=100 y=100
!setbusxy bus=671 x=200 y=100
!setbusxy bus=692 x=250 y=100
!setbusxy bus=675 x=400 y=100
!setbusxy bus=652 x=100 y=0
!setbusxy bus=680 x=200 y=0

! set voltages
set voltagebases=[115,4.16,0.48]
calcvoltagebases

! swing stuff
!new object=monitor.master element=vsource.source terminal=1 mode=1 ppolar=no
!set mode=yearly stepsize=1h number=1
!solve
!solve
!solve
!export monitors monitorname=master
!solve
!solve
!solve
!solve
!solve
!solve
!export monitors monitorname=master

!cap stuff
!new object=monitor.cap1 element=capacitor.cap1 terminal=1 mode=6
!set mode=yearly stepsize=1h number=100
!solve
!export monitors monitorname=cap1

!reg stuff
!new object=monitor.reg2 element=transformer.reg2 terminal=1 mode=2
!set mode=yearly stepsize=1h number=100
!solve
!export monitors monitorname=reg2
