clear
set defaultbasefrequency=60
new object=circuit.lehigh basekv=115 pu=1.0001 phases=3 bus1=sourcebus angle=30 mvasc3=20000 mvasc1=21000
edit object=vsource.source basekv=115 bus1=sourcebus.1.2.3 pu=1.00 r1=0 x1=0.0001 r0=0 x0=0.0001
new object=vsource.secondsource basekv=4.16 bus1=680.1.2.3 pu=1.00 r1=0 x1=0.0001 r0=0 x0=0.0001
new object=transformer.sub phases=3 windings=2 xhl=0.008 buses=[sourcebus.1.2.3,650.1.2.3] conns=[delta,wye] kvs=[115,4.16] kvas=[5000,5000] %rs=[0.0005,0.0005]
new object=transformer.reg1 phases=1 bank=reg1 xhl=0.01 kvas=[1666,1666] buses=[650.1,rg60.1] kvs=[2.4,2.4] %loadloss=0.01
new object=regcontrol.reg1 transformer=reg1 winding=2 vreg=121 band=2 ptratio=20 ctprim=700 r=3 x=9
new object=transformer.reg2 phases=1 bank=reg1 xhl=0.01 kvas=[1666,1666] buses=[650.2,rg60.2] kvs=[2.4,2.4] %loadloss=0.01
new object=regcontrol.reg2 transformer=reg2 winding=2 vreg=121 band=2 ptratio=20 ctprim=700 r=3 x=9
new object=transformer.reg3 phases=1 bank=reg1 xhl=0.01 kvas=[1666,1666] buses=[650.3,rg60.3] kvs=[2.4,2.4] %loadloss=0.01
new object=regcontrol.reg3 transformer=reg3 winding=2 vreg=121 band=2 ptratio=20 ctprim=700 r=3 x=9
new object=transformer.xfm1 phases=3 windings=2 xhl=2 buses=[633.1.2.3,634.1.2.3] conns=[wye,wye] kvs=[4.16,0.480] kvas=[500,500] %rs=[0.55,0.55] xht=1 xlt=1
new object=linecode.mtx601 nphases=3 basefreq=60 rmatrix=[0.3465|0.1560,0.3375|0.1580,0.1535,0.3414] xmatrix=[1.0179|0.5017,1.0478|0.4236,0.3849,1.0348] units=mi
new object=linecode.mtx602 nphases=3 basefreq=60 rmatrix=[0.7526|0.1580,0.7475|0.1560,0.1535,0.7436] xmatrix=[1.1814|0.4236,1.1983|0.5017,0.3849,1.2112] units=mi
new object=linecode.mtx603 nphases=2 basefreq=60 rmatrix=[1.3238|0.2066,1.3294] xmatrix=[1.3569|0.4591,1.3471] units=mi
new object=linecode.mtx604 nphases=2 basefreq=60 rmatrix=[1.3238|0.2066,1.3294] xmatrix=[1.3569|0.4591,1.3471] units=mi
new object=linecode.mtx605 nphases=1 basefreq=60 rmatrix=[1.3292] xmatrix=[1.3475] units=mi
new object=linecode.mtx606 nphases=3 units=mi rmatrix=[0.791721|0.318476,0.781649|0.28345,0.318476,0.791721] xmatrix=[0.438352|0.0276838,0.396697|-0.0184204,0.0276838,0.438352] cmatrix=[383.948|0,383.948|0,0,383.948]
new object=linecode.mtx607 nphases=1 basefreq=60 rmatrix=[1.3425] xmatrix=[0.5124] cmatrix=[236] units=mi
new object=loadshape.solar_670_shape npts=8760 interval=1 useactual=no mult=[0.0,0.0,0.0,0.0,0.0,0.0,0.0,0.0,0.01628447212384098,0.04937472641171555,0.06969785904731586,0.2141738628676032,0.04911407139161925,0.11477326992717578,0.17170400732221736,0.1848616140713916,0.09236589199729396,0.006122905806040829,0.0,0.0,0.0,0.0,0.0,0.0]
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new object=loadshape.diesel_670_shape npts=8760 interval=1 useactual=no mult=[nan,nan,nan,nan,nan,nan,nan,nan,nan,nan,nan,nan,nan,nan,nan,nan,nan,nan,nan,nan,nan,nan,nan,nan,nan,nan,nan,nan,nan,nan,nan,nan,nan,nan,nan,nan,nan,nan,nan,nan,nan,nan,nan,nan,nan,nan,nan,nan,nan,nan,nan,nan,nan,nan,nan,nan,nan,nan,nan,nan,nan,nan,nan,nan,nan,nan,nan,nan,nan,nan,nan,nan,nan,nan,nan,nan,nan,nan,nan,nan,nan,nan,nan,nan,nan,nan,nan,nan,nan,nan,nan,nan,nan,nan,nan,nan,nan,nan,nan,nan,nan,nan,nan,nan,nan,nan,nan,nan,nan,nan,nan,nan,nan,nan,nan,nan,nan,nan,nan,nan,nan,nan,nan,nan,nan,nan,nan,nan,nan,nan,nan,nan,nan,nan,nan,nan,nan,nan,nan,nan,nan,nan,nan,nan,nan,nan,nan,nan,nan,nan,nan,nan,nan,nan,nan,nan,nan,nan,nan,nan,nan,nan,nan,nan,nan,nan,nan,nan,nan,nan,nan,nan,nan,nan,nan,nan,nan,nan,nan,nan,nan,nan,nan,nan,nan,nan,nan,nan,nan,nan,nan,nan,nan,nan,nan,nan,nan,nan,nan,nan,nan,nan,nan,nan,nan,nan,nan,nan,nan,nan,nan,nan,nan,nan,nan,nan,nan,nan,nan,nan,nan,nan,nan,nan,nan,nan,nan,nan,nan,nan,nan,nan,nan,nan,nan,nan,nan,nan,nan,nan,nan,nan,nan,nan,nan,nan,nan,nan,nan,nan,nan,nan,nan,nan,nan,nan,nan,nan,nan,nan,nan,nan,nan,nan,nan,nan,nan,nan,nan,nan,nan,nan,nan,nan,nan,nan,nan,nan,nan,nan,nan,nan,nan,nan,nan,nan,nan,nan,nan,nan,nan,nan,nan,nan,nan,nan,nan,nan,nan,nan,nan,nan,nan,nan,nan,nan,nan,nan,nan,nan,nan,nan,nan,nan,nan,nan,nan,nan,nan,nan,nan,nan,nan,nan,nan,nan,nan,nan,nan,nan,nan,nan,nan,nan,nan,nan,nan,nan,nan,nan,nan,nan,nan,nan,nan,nan,nan,nan,nan,nan,nan,nan,nan,nan,nan,nan,nan,nan,nan,nan,nan,nan,nan,nan,nan,nan,nan,nan,nan,nan,nan,nan,nan,nan,nan,nan,nan,nan,nan,nan,nan,nan,nan,nan,nan,nan,nan,nan,nan,nan,nan,nan,nan,nan,nan,nan,nan,nan,nan,nan,nan,nan,nan,nan,nan,nan,nan,nan,nan,nan,nan,nan,nan,nan,nan,nan,nan,nan,nan,nan,nan,nan,nan,nan,nan,nan,nan,nan,nan,nan,nan,nan,nan,nan,nan,nan,nan,nan,nan,nan,nan,nan,nan,nan,nan,nan,nan,nan,nan,nan,nan,nan,nan,nan,nan,nan,nan,nan,nan,nan,nan,nan,nan,nan,nan,nan,nan,nan,nan,nan,nan,nan,nan,nan,nan,nan,nan,nan,nan,nan,nan,nan,nan,nan,nan,nan,nan,nan,nan,nan,nan,nan,nan,nan,nan,nan,nan,nan,nan,nan,nan,nan,nan,nan,nan,nan,nan,nan,nan,nan,nan,nan,nan,nan,nan,nan,nan,nan,nan,nan,nan,nan,nan,nan,nan,nan,nan,nan,nan,nan,nan,nan,nan,nan,nan,nan,nan,nan,nan,nan,nan,nan,nan,nan,nan,nan,nan,nan,nan,nan,nan,nan,nan,nan,nan,nan,nan,nan,nan,nan,nan,nan,nan,nan,nan,nan,nan,nan,nan,nan,nan,nan,nan,nan,nan,nan,nan,nan,nan,nan,nan,nan,nan,nan,nan,nan,nan,nan,nan,nan,nan,nan,nan,nan,nan,nan,nan,nan,nan,nan,nan,nan,nan,nan,nan,nan,nan,nan,nan,nan,nan,nan,nan,nan,nan,nan,nan,nan,nan,nan,nan,nan,nan,nan,nan,nan,nan,nan,nan,nan,nan,nan,nan,nan,nan,nan,nan,nan,nan,nan,nan,nan,nan,nan,nan,nan,nan,nan,nan,nan,nan,nan,nan,nan,nan,nan,nan,nan,nan,nan,nan,nan,nan,nan,nan,nan,nan,nan,nan,nan,nan,nan,nan,nan,nan,nan,nan,nan,nan,nan,nan,nan,nan,nan,nan,nan,nan,nan,nan,nan,nan,nan,nan,nan,nan,nan,nan,nan,nan,nan,nan,nan,nan,nan,nan,nan,nan,nan,nan,nan,nan,nan,nan,nan,nan,nan,nan,nan,nan,nan,nan,nan,nan,nan,nan,nan,nan,nan,nan,nan,nan,nan,nan,nan,nan,nan,nan,nan,nan,nan,nan,nan,nan,nan,nan,nan,nan,nan,nan,nan,nan,nan,nan,nan,nan,nan,nan,nan,nan,nan,nan,nan,nan,nan,nan,nan,nan,nan,nan,nan,nan,nan,nan,nan,nan,nan,nan,nan,nan,nan,nan,nan,nan,nan,nan,nan,nan,nan,nan,nan,nan,nan,nan,nan,nan,nan,nan,nan,nan,nan,nan,nan,nan,nan,nan,nan,nan,nan,nan,nan,nan,nan,nan,nan,nan,nan,nan,nan,nan,nan,nan,nan,nan,nan,nan,nan,nan,nan,nan,nan,nan,nan,nan,nan,nan,nan,nan,nan,nan,nan,nan,nan,nan,nan,nan,nan,nan,nan,nan,nan,nan,nan,nan,nan,nan,nan,nan,nan,nan,nan,nan,nan,nan,nan,nan,nan,nan,nan,nan,nan,nan,nan,nan,nan,nan,nan,nan,nan,nan,nan,nan,nan,nan,nan,nan,nan,nan,nan,nan,nan,nan,nan,nan,nan,nan,nan,nan,nan,nan,nan,nan,nan,nan,nan,nan,nan,nan,nan,nan,nan,nan,nan,nan,nan,nan,nan,nan,nan,nan,nan,nan,nan,nan,nan,nan,nan,nan,nan,nan,nan,nan,nan,nan,nan,nan,nan,nan,nan,nan,nan,nan,nan,nan,nan,nan,nan,nan,nan,nan,nan,nan,nan,nan,nan,nan,nan,nan,nan,nan,nan,nan,nan,nan,nan,nan,nan,nan,nan,nan,nan,nan,nan,nan,nan,nan,nan,nan,nan,nan,nan,na
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new object=loadshape.670c_residential2_shape npts=8760 interval=1 useactual=yes mult=[18.97864344,17.35795841,17.012931899999998,16.89293897,18.95710465,23.34621152,28.40798431,25.83088316,22.85587618,20.22639518,17.34313098,17.4373398,17.29393513,16.86525069,16.71803771,18.01567204,25.21350014,35.28494681,40.71475204,39.76648321,39.3628337,34.34391999,28.39072205,23.49395516]
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new object=loadshape.670b_residential2_shape npts=8760 interval=1 useactual=yes mult=[9.941194188999999,9.092263929,8.911535758,8.848682315,9.929911963,12.22896794,14.88037273,13.53046261,11.97212562,10.59477843,9.08449718,9.133844658,9.058727927,8.834178932,8.757067371,9.436780588,13.2070715,18.48259119,21.32677488,20.83006263,20.61862718,17.98967237,14.871330599999999,12.30635747]
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new object=loadshape.670a_residential2_shape npts=8760 interval=1 useactual=yes mult=[2.711234778,2.479708345,2.430418843,2.413276995,2.708157808,3.335173075,4.058283473,3.690126165,3.2651251689999996,2.889485025,2.477590141,2.4910485430000002,2.470562162,2.409321527,2.388291101,2.573667434,3.6019285919999997,5.040706688,5.816393149,5.680926173,5.623261958,4.906274283999999,4.055817435,3.3562793089999996]
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new object=loadshape.652_med_apartment_shape npts=8760 interval=1 useactual=yes mult=[20.786133300000003,19.01109731,18.63321113,18.50179029,20.76254319,25.56966024,31.11350662,28.29096726,25.03262629,22.15271853,18.99485774,19.09803883,18.94097657,18.47146504,18.31023177,19.73145033,27.61478587,38.64541793,44.59234747,43.55376731,43.11167501,37.61476952,31.09460035,25.7314747]
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new object=loadshape.611_hotel_shape npts=8760 interval=1 useactual=yes mult=[48.60427995,51.57608556,44.96393543,43.6071395,44.02403735,47.66907666,71.63600823,76.46836135,105.66435630000001,90.75791073,64.12903006,60.10230386,59.89526338,59.99009825,59.82437196,59.48775512,62.37364598,75.43221996,103.5723553,108.72817990000001,114.74080459999999,111.4666541,85.67344709,54.98920197]
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new object=loadshape.675c_residential1_shape npts=8760 interval=1 useactual=yes mult=[43.37975645,39.67533352,38.88670148,38.61243191,43.33052492,53.36276919,64.93253556,59.04201863,52.2420027,46.2317604,39.64144225,39.85677668,39.52899458,38.54914442,38.21265761,41.17867894,57.63085747,80.65130699999999,93.06229038,90.89481876,89.97219132,78.50038854,64.89307896,53.70046895]
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new object=loadshape.675b_residential1_shape npts=8760 interval=1 useactual=yes mult=[10.84493911,9.918833379,9.721675371,9.653107979,10.83263123,13.3406923,16.23313389,14.76050466,13.06050068,11.5579401,9.910360562000001,9.96419417,9.882248645,9.637286106,9.553164404,10.29466974,14.40771437,20.16282675,23.265572600000002,22.72370469,22.49304783,19.62509714,16.22326974,13.42511724]
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new object=loadshape.675a_hospital_shape npts=8760 interval=1 useactual=yes mult=[159.023675,160.9194375,162.9458125,163.4360125,171.4727125,170.579925,194.715825,196.1332125,214.3329625,212.152325,214.014225,214.8586375,213.6503375,211.4971125,212.1001875,212.2523,205.9705375,194.4422375,184.2722,182.8214875,172.781525,171.7205,163.1764,163.282825]
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new object=loadshape.692_warehouse2_shape npts=8760 interval=1 useactual=yes mult=[33.699,32.89233333,32.89233333,32.89233333,32.89233333,32.89233333,32.89233333,13.1,9.141666667,9.141666667,9.141666667,9.141666667,9.141666667,9.141666667,9.141666667,9.141666667,9.141666667,21.017,32.89233333,32.89233333,32.89233333,32.92833333,34.41233333,35.19066667]
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new object=loadshape.646_med_office_shape npts=8760 interval=1 useactual=yes mult=[29.11833872,29.11833872,29.11833872,29.11833872,29.11833872,29.11833872,29.11833872,17.77832471,15.51038129,15.51038129,15.51038129,15.51038129,15.51038129,15.51038129,15.51038129,15.51038129,15.51038129,22.31421155,29.11833872,29.11833872,29.11833872,29.11833872,29.11833872,29.11833872]
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new object=loadshape.645_warehouse1_shape npts=8760 interval=1 useactual=yes mult=[33.699,32.89233333,32.89233333,32.89233333,32.89233333,32.89233333,32.89233333,13.1,9.141666667,9.141666667,9.141666667,9.141666667,9.141666667,9.141666667,9.141666667,9.141666667,9.141666667,21.017,32.89233333,32.89233333,32.89233333,32.92833333,34.41233333,35.19066667]
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new object=loadshape.634c_supermarket_shape npts=8760 interval=1 useactual=yes mult=[12.91677778,13.59177778,13.79744444,13.87977778,14.76244444,14.65966667,18.78311111,19.06688889,22.32755556,20.12022222,24.96077778,27.50533333,30.364,30.39033333,29.73711111,29.30011111,29.10955556,25.57766667,25.59622222,24.03911111,22.44044444,19.76766667,12.68455556,15.93011111]
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new object=loadshape.634b_supermarket_shape npts=8760 interval=1 useactual=yes mult=[31.13513143,32.76217914,33.25792651,33.45638616,35.58400213,35.33626236,45.27558212,45.95961173,53.81925653,48.49860964,60.16648347,66.29998464,73.19063213,73.25410708,71.67955342,70.62619068,70.16686775,61.65345777,61.69818485,57.9448603,54.09136853,47.64879526,30.57537345,38.39859379999999]
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new object=loadshape.634a_supermarket_shape npts=8760 interval=1 useactual=yes mult=[38.75033333,40.77533333,41.39233333,41.63933333,44.28733333,43.979,56.34933333,57.20066667,66.98266667,60.36066667,74.88233333,82.516,91.09200000000001,91.171,89.21133333,87.90033333,87.32866667,76.733,76.78866667,72.11733333,67.32133333,59.303000000000004,38.05366667,47.79033333]
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new object=loadshape.671_hospital_shape npts=8760 interval=1 useactual=yes mult=[295.858,299.385,303.155,304.067,319.019,317.358,362.26199999999994,364.899,398.759,394.702,398.166,399.73699999999997,397.48900000000003,393.483,394.605,394.88800000000003,383.20099999999996,361.75300000000004,342.832,340.13300000000004,321.454,319.48,303.584,303.782]
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new object=load.671_hospital bus1=671.1.2.3 phases=3 conn=delta model=1 kv=4.16 kw=1155 kvar=660 yearly=671_hospital_shape
new object=load.634a_supermarket bus1=634.1 phases=1 conn=wye model=1 kv=0.277 kw=160 kvar=110 yearly=634a_supermarket_shape
new object=load.634b_supermarket bus1=634.2 phases=1 conn=wye model=1 kv=0.277 kw=120 kvar=90 yearly=634b_supermarket_shape
new object=load.634c_supermarket bus1=634.3 phases=1 conn=wye model=1 kv=0.277 kw=120 kvar=90 yearly=634c_supermarket_shape
new object=load.645_warehouse1 bus1=645.2 phases=1 conn=wye model=1 kv=2.4 kw=170 kvar=125 yearly=645_warehouse1_shape
new object=load.646_med_office bus1=646.2.3 phases=1 conn=delta model=2 kv=4.16 kw=230 kvar=132 yearly=646_med_office_shape
new object=load.692_warehouse2 bus1=692.3.1 phases=1 conn=delta model=5 kv=4.16 kw=170 kvar=151 yearly=692_warehouse2_shape
new object=load.675a_hospital bus1=675.1 phases=1 conn=wye model=1 kv=2.4 kw=485 kvar=190 yearly=675a_hospital_shape
new object=load.675b_residential1 bus1=675.2 phases=1 conn=wye model=1 kv=2.4 kw=68 kvar=60 yearly=675b_residential1_shape
new object=load.675c_residential1 bus1=675.3 phases=1 conn=wye model=1 kv=2.4 kw=290 kvar=212 yearly=675c_residential1_shape
new object=load.611_hotel bus1=611.3 phases=1 conn=wye model=5 kv=2.4 kw=170 kvar=80 yearly=611_hotel_shape
new object=load.652_med_apartment bus1=652.1 phases=1 conn=wye model=2 kv=2.4 kw=128 kvar=86 yearly=652_med_apartment_shape
new object=load.670a_residential2 bus1=670.1 phases=1 conn=wye model=1 kv=2.4 kw=17 kvar=10 yearly=670a_residential2_shape
new object=load.670b_residential2 bus1=670.2 phases=1 conn=wye model=1 kv=2.4 kw=66 kvar=38 yearly=670b_residential2_shape
new object=load.670c_residential2 bus1=670.3 phases=1 conn=wye model=1 kv=2.4 kw=117 kvar=68 yearly=670c_residential2_shape
new object=line.670671 phases=3 bus1=670.1.2.3 bus2=671.1.2.3 linecode=mtx601 length=1333 units=ft
new object=line.671680 phases=3 bus1=671.1.2.3 bus2=680.1.2.3 linecode=mtx601 length=1000 units=ft
new object=line.645646 phases=2 bus1=645.3.2 bus2=646.3.2 linecode=mtx603 length=300 units=ft
new object=line.692675 phases=3 bus1=692.1.2.3 bus2=675.1.2.3 linecode=mtx606 length=500 units=ft
new object=line.684611 phases=1 bus1=684.3 bus2=611.3 linecode=mtx605 length=300 units=ft
new object=line.684652 phases=1 bus1=684.1 bus2=652.1 linecode=mtx607 length=800 units=ft
new object=line.671692 phases=3 bus1=671.1.2.3 bus2=692.1.2.3 switch=y r1=1e-4 r0=1e-4 x1=0.000 x0=0.000 c1=0.000 c0=0.000
new object=line.632633 phases=3 bus1=632.1.2.3 bus2=633.1.2.3 switch=y linecode=mtx602 length=500 units=ft
new object=line.671684 phases=2 bus1=671.1.3 bus2=684.1.3 switch=y linecode=mtx604 length=300 units=ft
new object=line.632645 phases=2 bus1=632.3.2 bus2=645.3.2 switch=y linecode=mtx603 length=500 units=ft
new object=line.632670 phases=3 bus1=632.1.2.3 bus2=670.1.2.3 switch=y linecode=mtx601 length=667 units=ft
new object=line.650632 phases=3 bus1=rg60.1.2.3 bus2=632.1.2.3 switch=y linecode=mtx601 length=2000 units=ft
new object=storage.battery_670 bus1=670.1.2.3 kv=4.16 kw=1146.8855880345 phases=3 kwhstored=1042.1485189029 kwhrated=1042.1485189029 kva=383.620352149216 kvar=383.620352149216 %charge=100 %discharge=100 %effcharge=100 %effdischarge=100 %idlingkw=1 %r=0 %x=50
new object=generator.diesel_670 bus1=670.1.2.3 kv=4.16 kw=1146.8855880345 phases=3 pf=1 xdp=0.27 xdpp=0.2 h=2 conn=delta yearly=diesel_670_shape
new object=generator.solar_670 bus1=670.1.2.3 phases=3 kv=4.16 kw=2779.5088 pf=1 yearly=solar_670_shape
makebuslist
setbusxy bus=sourcebus y=30.285013 x=-84.071493
setbusxy bus=650 y=30.285013 x=-84.071993
setbusxy bus=rg60 y=30.285013 x=-84.072493
setbusxy bus=646 y=30.283013 x=-84.072993
setbusxy bus=645 y=30.284013 x=-84.072993
setbusxy bus=632 y=30.285013 x=-84.072993
setbusxy bus=633 y=30.286513 x=-84.072993
setbusxy bus=634 y=30.287013 x=-84.072993
setbusxy bus=670 y=30.285013 x=-84.073493
setbusxy bus=611 y=30.283013 x=-84.074493
setbusxy bus=684 y=30.284013 x=-84.074493
setbusxy bus=671 y=30.285013 x=-84.074493
setbusxy bus=692 y=30.285513 x=-84.074493
setbusxy bus=675 y=30.287013 x=-84.074493
setbusxy bus=652 y=30.284013 x=-84.075493
setbusxy bus=680 y=30.285013 x=-84.075493
set voltagebases=[115,4.16,0.48]
calcvoltagebases
