clear
set defaultbasefrequency=60
new object=circuit.lehigh basekv=115 pu=1.0001 phases=3 bus1=sourcebus angle=30 mvasc3=20000 mvasc1=21000
edit object=vsource.source basekv=115 bus1=sourcebus.1.2.3 pu=1.00 r1=0 x1=0.0001 r0=0 x0=0.0001
!new object=vsource.secondsource basekv=4.16 bus1=680.1.2.3 pu=1.00 r1=0 x1=0.0001 r0=0 x0=0.0001
new object=transformer.sub phases=3 windings=2 xhl=0.008 buses=[sourcebus.1.2.3,650.1.2.3] conns=[delta,wye] kvs=[115,4.16] kvas=[5000,5000] %rs=[0.0005,0.0005]
new object=transformer.reg1 phases=1 bank=reg1 xhl=0.01 kvas=[1666,1666] buses=[650.1,rg60.1] kvs=[2.4,2.4] %loadloss=0.01
new object=regcontrol.reg1 transformer=reg1 winding=2 vreg=122 band=2 ptratio=20 ctprim=700 r=3 x=9
new object=transformer.reg2 phases=1 bank=reg1 xhl=0.01 kvas=[1666,1666] buses=[650.2,rg60.2] kvs=[2.4,2.4] %loadloss=0.01
new object=regcontrol.reg2 transformer=reg2 winding=2 vreg=122 band=2 ptratio=20 ctprim=700 r=3 x=9
new object=transformer.reg3 phases=1 bank=reg1 xhl=0.01 kvas=[1666,1666] buses=[650.3,rg60.3] kvs=[2.4,2.4] %loadloss=0.01
new object=regcontrol.reg3 transformer=reg3 winding=2 vreg=122 band=2 ptratio=20 ctprim=700 r=3 x=9
new object=transformer.xfm1 phases=3 windings=2 xhl=2 buses=[633.1.2.3,634.1.2.3] conns=[wye,wye] kvs=[4.16,0.480] kvas=[500,500] %rs=[0.55,0.55] xht=1 xlt=1
new object=linecode.mtx601 nphases=3 basefreq=60 rmatrix=[0.3465|0.1560,0.3375|0.1580,0.1535,0.3414] xmatrix=[1.0179|0.5017,1.0478|0.4236,0.3849,1.0348] units=mi
new object=linecode.mtx602 nphases=3 basefreq=60 rmatrix=[0.7526|0.1580,0.7475|0.1560,0.1535,0.7436] xmatrix=[1.1814|0.4236,1.1983|0.5017,0.3849,1.2112] units=mi
new object=linecode.mtx603 nphases=2 basefreq=60 rmatrix=[1.3238|0.2066,1.3294] xmatrix=[1.3569|0.4591,1.3471] units=mi
new object=linecode.mtx604 nphases=2 basefreq=60 rmatrix=[1.3238|0.2066,1.3294] xmatrix=[1.3569|0.4591,1.3471] units=mi
new object=linecode.mtx605 nphases=1 basefreq=60 rmatrix=[1.3292] xmatrix=[1.3475] units=mi
new object=linecode.mtx606 nphases=3 units=mi rmatrix=[0.791721|0.318476,0.781649|0.28345,0.318476,0.791721] xmatrix=[0.438352|0.0276838,0.396697|-0.0184204,0.0276838,0.438352] cmatrix=[383.948|0,383.948|0,0,383.948]
new object=linecode.mtx607 nphases=1 basefreq=60 rmatrix=[1.3425] xmatrix=[0.5124] cmatrix=[236] units=mi
new object=loadshape.solar_634_shape npts=8760 interval=1 useactual=no mult=[0.0,0.0,0.0,0.0,0.0,0.0,0.0,0.0,0.016284954047568526,0.04937396953916975,0.06969751383470184,0.2141726113713903,0.049112783427741225,0.11477170701447953,0.1717037496531122,0.18486100001632413,0.09236520348030493,0.006121549486606049,0.0,0.0,0.0,0.0,0.0,0.0]
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new object=loadshape.diesel_634_shape npts=8760 interval=1 useactual=no mult=[0.0,0.0,0.0,0.0,0.0,0.0,0.0,0.0,0.0,0.0,0.0,0.0,0.0,0.0,0.0,0.0,0.0,0.0,0.0,0.0,0.0,0.0,0.0,0.0]
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new object=loadshape.solar_675_shape npts=8760 interval=1 useactual=no mult=[0.0,0.0,0.0,0.0,0.0,0.0,0.0,0.0,0.016286006274360682,0.04937494058370568,0.0696982840574199,0.21417494533700926,0.04911350888867763,0.11477445574674397,0.1717041781538169,0.18486191653198966,0.09236560034223787,0.00612284913014545,0.0,0.0,0.0,0.0,0.0,0.0]
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new object=loadshape.diesel_675_shape npts=8760 interval=1 useactual=no mult=[0.0,0.0,0.0,0.0,0.0,0.0,0.0,0.0,0.0,0.0,0.0,0.0,0.0,0.0,0.0,0.0,0.0,0.0,0.0,0.0,0.0,0.0,0.0,0.0]
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new object=loadshape.solar_684_shape npts=8760 interval=1 useactual=no mult=[0.0,0.0,0.0,0.0,0.0,0.0,0.0,0.0,0.01628507283001269,0.04937446448520081,0.0696982679146647,0.21417473780110846,0.049114163620785016,0.11477370093599852,0.17170366915760135,0.1848624201472869,0.0923661348575395,0.00612249324844633,0.0,0.0,0.0,0.0,0.0,0.0]
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new object=loadshape.diesel_684_shape npts=8760 interval=1 useactual=no mult=[0.0,0.0,0.0,0.0,0.0,0.0,0.0,0.0,0.0,0.0,0.0,0.0,0.0,0.0,0.0,0.0,0.0,0.0,0.0,0.0,0.0,0.0,0.0,0.0]
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new object=loadshape.solar_646_shape npts=8760 interval=1 useactual=no mult=[0.0,0.0,0.0,0.0,0.0,0.0,0.0,0.0,0.016284741917186613,0.049376063528077135,0.06969937606352808,0.2141747022121384,0.04911514463981849,0.11477027793533748,0.17170731707317072,0.18486103233125356,0.0923652864435621,0.0061202495745887675,0.0,0.0,0.0,0.0,0.0,0.0]
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new object=loadshape.diesel_646_shape npts=8760 interval=1 useactual=no mult=[0.0,0.0,0.0,0.0,0.0,0.0,0.0,0.0,0.0,0.0,0.0,0.0,0.0,0.0,0.0,0.0,0.0,0.0,0.0,0.0,0.0,0.0,0.0,0.0]
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new object=loadshape.670c_residential2_shape npts=8760 interval=1 useactual=yes mult=[28.91983763,26.45022234,25.92446766,25.74162128,28.88701661,35.57517946,43.28835704,39.36134576,34.828001799999996,30.8211736,26.42762816,26.57118445,26.35266305,25.69942962,25.47510508,27.45245263,38.42057164,53.767538,62.04152692,60.59654584,59.98146088,52.33359236,43.26205264,35.80031263]
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new object=loadshape.670b_residential2_shape npts=8760 interval=1 useactual=yes mult=[14.45991882,13.22511117,12.96223383,12.87081064,14.44350831,17.78758973,21.64417852,19.68067288,17.414000899999998,15.4105868,13.21381408,13.28559223,13.17633153,12.84971481,12.73755254,13.72622631,19.21028582,26.883769,31.02076346,30.29827292,29.99073044,26.16679618,21.63102632,17.90015632]
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new object=loadshape.670a_residential2_shape npts=8760 interval=1 useactual=yes mult=[3.6149797039999996,3.306277793,3.2405584569999997,3.21770266,3.610877077,4.446897433,5.41104463,4.92016822,4.353500225,3.8526467,3.3034535210000002,3.3213980569999997,3.294082882,3.212428702,3.184388135,3.4315565789999996,4.802571456,6.72094225,7.755190865,7.57456823,7.49768261,6.541699045,5.40775658,4.475039079]
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new object=loadshape.652_med_apartment_shape npts=8760 interval=1 useactual=yes mult=[30.39925,27.8033,27.25065,27.05845,30.36475,37.39505,45.5028,41.3749,36.60965,32.39785,27.77955,27.93045,27.70075,27.0141,26.7783,28.8568,40.385999999999996,56.51805,65.2153,63.6964,63.04985,55.01075,45.47515,37.6317]
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new object=loadshape.611_hotel_shape npts=8760 interval=1 useactual=yes mult=[103.52799999999999,109.85799999999999,95.774,92.884,93.772,101.536,152.586,162.879,225.067,193.31599999999997,136.596,128.019,127.57799999999999,127.78,127.427,126.71,132.857,160.672,220.611,231.593,244.4,237.426,182.486,117.12799999999999]
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new object=loadshape.675c_residential1_shape npts=8760 interval=1 useactual=yes mult=[43.37975645,39.67533352,38.88670148,38.61243191,43.33052492,53.36276919,64.93253556,59.04201863,52.2420027,46.2317604,39.64144225,39.85677668,39.52899458,38.54914442,38.21265761,41.17867894,57.63085747,80.65130699999999,93.06229038,90.89481876,89.97219132,78.50038854,64.89307896,53.70046895]
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new object=loadshape.675b_residential1_shape npts=8760 interval=1 useactual=yes mult=[10.84493911,9.918833379,9.721675371,9.653107979,10.83263123,13.3406923,16.23313389,14.76050466,13.06050068,11.5579401,9.910360562000001,9.96419417,9.882248645,9.637286106,9.553164404,10.29466974,14.40771437,20.16282675,23.265572600000002,22.72370469,22.49304783,19.62509714,16.22326974,13.42511724]
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new object=loadshape.675a_residential1_shape npts=8760 interval=1 useactual=yes mult=[72.29959408,66.12555586,64.81116914,64.35405319,72.21754153,88.93794865,108.2208926,98.40336439,87.07000450000001,77.052934,66.06907041,66.42796113,65.88165763,64.24857404,63.68776269,68.63113157,96.05142911,134.418845,155.10381730000003,151.4913646,149.9536522,130.8339809,108.15513159999999,89.50078158]
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new object=loadshape.692_warehouse2_shape npts=8760 interval=1 useactual=yes mult=[33.699,32.89233333,32.89233333,32.89233333,32.89233333,32.89233333,32.89233333,13.1,9.141666667,9.141666667,9.141666667,9.141666667,9.141666667,9.141666667,9.141666667,9.141666667,9.141666667,21.017,32.89233333,32.89233333,32.89233333,32.92833333,34.41233333,35.19066667]
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new object=loadshape.646_med_office_shape npts=8760 interval=1 useactual=yes mult=[32.68833333,32.68833333,32.68833333,32.68833333,32.68833333,32.68833333,32.68833333,19.958,17.412,17.412,17.412,17.412,17.412,17.412,17.412,17.412,17.412,25.05,32.68833333,32.68833333,32.68833333,32.68833333,32.68833333,32.68833333]
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new object=loadshape.645_warehouse1_shape npts=8760 interval=1 useactual=yes mult=[33.699,32.89233333,32.89233333,32.89233333,32.89233333,32.89233333,32.89233333,13.1,9.141666667,9.141666667,9.141666667,9.141666667,9.141666667,9.141666667,9.141666667,9.141666667,9.141666667,21.017,32.89233333,32.89233333,32.89233333,32.92833333,34.41233333,35.19066667]
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new object=loadshape.634c_supermarket_shape npts=8760 interval=1 useactual=yes mult=[12.91677778,13.59177778,13.79744444,13.87977778,14.76244444,14.65966667,18.78311111,19.06688889,22.32755556,20.12022222,24.96077778,27.50533333,30.364,30.39033333,29.73711111,29.30011111,29.10955556,25.57766667,25.59622222,24.03911111,22.44044444,19.76766667,12.68455556,15.93011111]
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new object=loadshape.634b_supermarket_shape npts=8760 interval=1 useactual=yes mult=[38.75033333,40.77533333,41.39233333,41.63933333,44.28733333,43.979,56.34933333,57.20066667,66.98266667,60.36066667,74.88233333,82.516,91.09200000000001,91.171,89.21133333,87.90033333,87.32866667,76.733,76.78866667,72.11733333,67.32133333,59.303000000000004,38.05366667,47.79033333]
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new object=loadshape.634a_supermarket_shape npts=8760 interval=1 useactual=yes mult=[38.75033333,40.77533333,41.39233333,41.63933333,44.28733333,43.979,56.34933333,57.20066667,66.98266667,60.36066667,74.88233333,82.516,91.09200000000001,91.171,89.21133333,87.90033333,87.32866667,76.733,76.78866667,72.11733333,67.32133333,59.303000000000004,38.05366667,47.79033333]
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new object=loadshape.671_hospital_shape npts=8760 interval=1 useactual=yes mult=[295.858,299.385,303.155,304.067,319.019,317.358,362.26199999999994,364.899,398.759,394.702,398.166,399.73699999999997,397.48900000000003,393.483,394.605,394.88800000000003,383.20099999999996,361.75300000000004,342.832,340.13300000000004,321.454,319.48,303.584,303.782]
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new object=loadshape.pvloadshape npts=1500 minterval=1 mult=[ -0.00266363 -0.00265838 -0.00265524 -0.00266258 -0.00269825 -0.00270035 -0.00268881 -0.00266468 -0.00266468 -0.00266468 -0.00266153 -0.00266468 -0.00266887 -0.00266678 -0.00266573 -0.00266468 -0.00266468 -0.00270244 -0.00271608 -0.00268881 -0.00267727 -0.00268671 -0.00268986 -0.00268776] action=Normalize
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new object=load.671_hospital bus1=671.1.2.3 phases=3 conn=delta model=1 kv=4.16 kw=1155 kvar=660 yearly=671_hospital_shape
new object=load.634a_supermarket bus1=634.1 phases=1 conn=wye model=1 kv=0.277 kw=160 kvar=110 yearly=634a_supermarket_shape
new object=load.634b_supermarket bus1=634.2 phases=1 conn=wye model=1 kv=0.277 kw=120 kvar=90 yearly=634b_supermarket_shape
new object=load.634c_supermarket bus1=634.3 phases=1 conn=wye model=1 kv=0.277 kw=120 kvar=90 yearly=634c_supermarket_shape
new object=load.645_warehouse1 bus1=645.2 phases=1 conn=wye model=1 kv=2.4 kw=170 kvar=125 yearly=645_warehouse1_shape
new object=load.646_med_office bus1=646.2.3 phases=1 conn=delta model=2 kv=4.16 kw=230 kvar=132 yearly=646_med_office_shape
new object=load.692_warehouse2 bus1=692.3.1 phases=1 conn=delta model=5 kv=4.16 kw=170 kvar=151 yearly=692_warehouse2_shape
new object=load.675a_residential1 bus1=675.1 phases=1 conn=wye model=1 kv=2.4 kw=485 kvar=190 yearly=675a_residential1_shape
new object=load.675b_residential1 bus1=675.2 phases=1 conn=wye model=1 kv=2.4 kw=68 kvar=60 yearly=675b_residential1_shape
new object=load.675c_residential1 bus1=675.3 phases=1 conn=wye model=1 kv=2.4 kw=290 kvar=212 yearly=675c_residential1_shape
new object=load.611_hotel bus1=611.3 phases=1 conn=wye model=5 kv=2.4 kw=170 kvar=80 yearly=611_hotel_shape
new object=load.652_med_apartment bus1=652.1 phases=1 conn=wye model=2 kv=2.4 kw=128 kvar=86 yearly=652_med_apartment_shape
new object=load.670a_residential2 bus1=670.1 phases=1 conn=wye model=1 kv=2.4 kw=17 kvar=10 yearly=670a_residential2_shape
new object=load.670b_residential2 bus1=670.2 phases=1 conn=wye model=1 kv=2.4 kw=66 kvar=38 yearly=670b_residential2_shape
new object=load.670c_residential2 bus1=670.3 phases=1 conn=wye model=1 kv=2.4 kw=117 kvar=68 yearly=670c_residential2_shape
new object=line.670671 phases=3 bus1=670.1.2.3 bus2=671.1.2.3 linecode=mtx601 length=1333 units=ft
new object=line.671680 phases=3 bus1=671.1.2.3 bus2=680.1.2.3 linecode=mtx601 length=1000 units=ft
new object=line.645646 phases=2 bus1=645.3.2 bus2=646.3.2 linecode=mtx603 length=300 units=ft
new object=line.692675 phases=3 bus1=692.1.2.3 bus2=675.1.2.3 linecode=mtx606 length=500 units=ft
new object=line.684611 phases=1 bus1=684.3 bus2=611.3 linecode=mtx605 length=300 units=ft
new object=line.684652 phases=1 bus1=684.1 bus2=652.1 linecode=mtx607 length=800 units=ft
new object=line.671692 phases=3 bus1=671.1.2.3 bus2=692.1.2.3 switch=y r1=1e-4 r0=1e-4 x1=0.000 x0=0.000 c1=0.000 c0=0.000
new object=line.632633 phases=3 bus1=632.1.2.3 bus2=633.1.2.3 switch=y linecode=mtx602 length=500 units=ft
new object=line.671684 phases=2 bus1=671.1.3 bus2=684.1.3 switch=y linecode=mtx604 length=300 units=ft
new object=line.632645 phases=2 bus1=632.3.2 bus2=645.3.2 switch=y linecode=mtx603 length=500 units=ft
new object=line.632670 phases=3 bus1=632.1.2.3 bus2=670.1.2.3 switch=y linecode=mtx601 length=667 units=ft
new object=line.650632 phases=3 bus1=rg60.1.2.3 bus2=632.1.2.3 switch=y linecode=mtx601 length=2000 units=ft

new object=storage.battery_646 bus1=646.1.2.3 kv=4.16 kw=41.5770759909644 phases=3 kwhstored=109.771117253636 kwhrated=109.771117253636 kva=46.9298452275058 kvar=46.9298452275058 %charge=100 %discharge=100 %effcharge=100 %effdischarge=100 %idlingkw=1 %r=0 %x=50
new object=generator.diesel_646 bus1=646.1.2.3 kv=4.16 kw=41.5770759909644 phases=3 pf=1 xdp=0.27 xdpp=0.2 h=2 conn=delta yearly=diesel_646_shape
new object=generator.solar_646 bus1=646.1.2.3 phases=3 kv=4.16 kw=243.7557 pf=1 yearly=solar_646_shape

new object=storage.battery_684 bus1=684.1.2.3 kv=4.16 kw=286.058010000001 phases=3 kwhstored=267.257072857265 kwhrated=267.257072857265 kva=122.301757755653 kvar=122.301757755653 %charge=100 %discharge=100 %effcharge=100 %effdischarge=100 %idlingkw=1 %r=0 %x=50
new object=generator.diesel_684 bus1=684.1.2.3 kv=4.16 kw=286.058010000001 phases=3 pf=1 xdp=0.27 xdpp=0.2 h=2 conn=delta yearly=diesel_684_shape
new object=generator.solar_684 bus1=684.1.2.3 phases=3 kv=4.16 kw=1019.8343 pf=1 yearly=solar_684_shape

new object=storage.battery_675 bus1=675.1.2.3 kv=4.16 kw=136.251106237733 phases=3 kwhstored=233.831724322805 kwhrated=233.831724322805 kva=69.32890519 kvar=69.32890519 %charge=100 %discharge=100 %effcharge=100 %effdischarge=100 %idlingkw=1 %r=0 %x=50
new object=generator.diesel_675 bus1=675.1.2.3 kv=4.16 kw=136.251106237733 phases=3 pf=1 xdp=0.27 xdpp=0.2 h=2 conn=delta yearly=diesel_675_shape
new object=generator.solar_675 bus1=675.1.2.3 phases=3 kv=4.16 kw=465.4025 pf=1 yearly=solar_675_shape

new object=storage.battery_634 bus1=634.1.2.3 kv=4.16 kw=98.5383454429303 phases=3 kwhstored=106.438291988774 kwhrated=106.438291988774 kva=44.9222212260701 kvar=44.9222212260701 %charge=100 %discharge=100 %effcharge=100 %effdischarge=100 %idlingkw=1 %r=0 %x=50
new object=generator.diesel_634 bus1=634.1.2.3 kv=4.16 kw=98.5383454429303 phases=3 pf=1 xdp=0.27 xdpp=0.2 h=2 conn=delta yearly=diesel_634_shape
new object=generator.solar_634 bus1=634.1.2.3 phases=3 kv=4.16 kw=423.4897 pf=1 yearly=solar_634_shape

!New "Isource.isource_0_solar_675_shape" bus1=675.1 phases=1 angle=240.000000 amps=219.969000 daily=675a_residential1_shape-solar_675_shape
!New "Isource.isource_1_solar_675_shape" bus1=675.2 phases=1 angle=120.000000 amps=65.000000 daily=675b_residential1_shape-solar_675_shape
!New "Isource.isource_2_solar_675_shape" bus1=675.3 phases=1 angle=0.000000 amps=169.120000 daily=675c_residential1_shape-solar_675_shape

New "Isource.isource_0_solar_675_shape" bus1=675.1 phases=1 angle=240.000000 amps=219.969000 daily=solar_675_shape
New "Isource.isource_1_solar_675_shape" bus1=675.2 phases=1 angle=120.000000 amps=65.000000 daily=solar_675_shape
New "Isource.isource_2_solar_675_shape" bus1=675.3 phases=1 angle=0.000000 amps=169.120000 daily=solar_675_shape

New "Isource.isource_0_diesel_675_shape" bus1=675.1 phases=1 angle=240.000000 amps=219.969000 daily=diesel_675_shape
New "Isource.isource_1_diesel_675_shape" bus1=675.2 phases=1 angle=120.000000 amps=65.000000 daily=diesel_675_shape
New "Isource.isource_2_diesel_675_shape" bus1=675.3 phases=1 angle=0.000000 amps=169.120000 daily=diesel_675_shape

!New "Isource.isource_0_solar_684_shape" bus1=684.1 phases=1 angle=240.000000 amps=219.969000 daily=solar_684_shape
!New "Isource.isource_1_solar_684_shape" bus1=684.2 phases=1 angle=120.000000 amps=65.000000 daily=solar_684_shape
!New "Isource.isource_2_solar_684_shape" bus1=684.3 phases=1 angle=0.000000 amps=169.120000 daily=solar_684_shape

!New "Isource.isource_0_diesel_684_shape" bus1=684.1 phases=1 angle=240.000000 amps=219.969000 daily=diesel_684_shape
!New "Isource.isource_1_diesel_684_shape" bus1=684.2 phases=1 angle=120.000000 amps=65.000000 daily=diesel_684_shape
!New "Isource.isource_2_diesel_684_shape" bus1=684.3 phases=1 angle=0.000000 amps=169.120000 daily=diesel_684_shape

New "Isource.isource_0_solar_634_shape" bus1=634.1 phases=1 angle=240.000000 amps=219.969000 daily=solar_634_shape
New "Isource.isource_1_solar_634_shape" bus1=634.2 phases=1 angle=120.000000 amps=65.000000 daily=solar_634_shape
New "Isource.isource_2_solar_634_shape" bus1=634.3 phases=1 angle=0.000000 amps=169.120000 daily=solar_634_shape

New "Isource.isource_0_diesel_634_shape" bus1=634.1 phases=1 angle=240.000000 amps=219.969000 daily=diesel_634_shape
New "Isource.isource_1_diesel_634_shape" bus1=634.2 phases=1 angle=120.000000 amps=65.000000 daily=diesel_634_shape
New "Isource.isource_2_diesel_634_shape" bus1=634.3 phases=1 angle=0.000000 amps=169.120000 daily=diesel_634_shape

New "Isource.isource_0_solar_646_shape" bus1=646.1 phases=1 angle=240.000000 amps=219.969000 daily=solar_646_shape
New "Isource.isource_1_solar_646_shape" bus1=646.2 phases=1 angle=120.000000 amps=65.000000 daily=solar_646_shape
New "Isource.isource_2_solar_646_shape" bus1=646.3 phases=1 angle=0.000000 amps=169.120000 daily=solar_646_shape

New "Isource.isource_0_diesel_646_shape" bus1=646.1 phases=1 angle=240.000000 amps=219.969000 daily=diesel_646_shape
New "Isource.isource_1_diesel_646_shape" bus1=646.2 phases=1 angle=120.000000 amps=65.000000 daily=diesel_646_shape
New "Isource.isource_2_diesel_646_shape" bus1=646.3 phases=1 angle=0.000000 amps=169.120000 daily=diesel_646_shape

makebuslist
setbusxy bus=sourcebus y=30.285013 x=-84.071493
setbusxy bus=650 y=30.285013 x=-84.071993
setbusxy bus=rg60 y=30.285013 x=-84.072493
setbusxy bus=646 y=30.283013 x=-84.072993
setbusxy bus=645 y=30.284013 x=-84.072993
setbusxy bus=632 y=30.285013 x=-84.072993
setbusxy bus=633 y=30.286513 x=-84.072993
setbusxy bus=634 y=30.287013 x=-84.072993
setbusxy bus=670 y=30.285013 x=-84.073493
setbusxy bus=611 y=30.283013 x=-84.074493
setbusxy bus=684 y=30.284013 x=-84.074493
setbusxy bus=671 y=30.285013 x=-84.074493
setbusxy bus=692 y=30.285513 x=-84.074493
setbusxy bus=675 y=30.287013 x=-84.074493
setbusxy bus=652 y=30.284013 x=-84.075493
setbusxy bus=680 y=30.285013 x=-84.075493
set voltagebases=[115,4.16,0.48]
calcvoltagebases

solve

Open line.671692 term=2
Open line.632633 term=2
Open line.671684 term=2
Open line.632645 term=2
Open line.632670 term=2
Open line.650632 term=2

!new monitor.MVoltage element=Line.670671 mode=0 terminal=2
!new monitor.MVoltage element=Line.671680 mode=0 terminal=2
!new monitor.MVoltage element=Line.645646 mode=0 terminal=2
new monitor.MVoltage element=Line.692675 mode=0 terminal=2
!new monitor.MVoltage element=Line.684611 mode=0 terminal=2
!new monitor.MVoltage element=Line.684652 mode=0 terminal=2

new monitor.MIsource element=Isource.isource_0_solar_675_shape

set mode=daily
solve

plot monitor object=MVoltage channels=(1 3  5) mode=0 terminal=2
